echo both
atom_style  granular
atom_modify map array
communicate single vel yes

include     parameters.par

boundary    f f f
newton      off

units       si

#read_restart restart/post_init_size.restart
read_data init.data

neighbor    ${particle_size} bin
neigh_modify delay 0

#Material properties required for new pair styles
fix         m1 all property/global youngsModulus peratomtype ${ym1} ${ym2}
fix         m2 all property/global poissonsRatio peratomtype ${pr1} ${pr2}
fix         m3 all property/global coefficientRestitution peratomtypepair 2 ${cr11} ${cr12} &
                                                                            ${cr21} ${cr22}
fix         m4 all property/global coefficientFriction peratomtypepair 2    ${cf11} ${cf12} &
                                                                            ${cf21} ${cf22}
fix         m5 all property/global coefficientRollingFriction peratomtypepair 2 ${crf11} ${crf12} &
                                                                                ${crf21} ${crf22}

#pair style
pair_style  gran model hertz tangential history rolling_friction epsd2
pair_coeff  * *

#timestep
variable dt equal 2.5e-5
timestep ${dt}

fix     gravi all gravity 9.81 vector 0.0 0.0 -1.0

variable hole_scale equal ${hole_size}/0.038*0.001

#-import mesh from cad:
fix     bottom all mesh/surface/stress file meshes/hopper_bottom.stl type 2 scale 0.001
#consider -${wall_angle} is actually wrong (as the parser seems not able to process it correctly), but it's kept for reproducibility reasons
fix     slanted_left  all mesh/surface/stress file meshes/hopper_slanted_wall.stl type 2 scale 0.001 rotate axis 0 1 0 angle -${wall_angle} move -0.03 0. 0.046
fix     slanted_right all mesh/surface/stress file meshes/hopper_slanted_wall.stl type 2 scale 0.001 rotate axis 0 1 0 angle  ${wall_angle} move  0.03 0. 0.046
fix     front all mesh/surface/stress file meshes/hopper_side_wall.stl type 2 scale 0.001 move 0. 0.13 0.
fix     back  all mesh/surface/stress file meshes/hopper_side_wall.stl type 2 scale 0.001
fix     hole  all mesh/surface/stress file meshes/hopper_plate.stl type 2 scale ${hole_scale}
fix     regborder all mesh/surface/stress file meshes/border.stl type 2

#-use the imported mesh as granular wall
fix     granwalls all wall/gran model hertz tangential history rolling_friction epsd2 mesh n_meshes 7 meshes bottom slanted_left slanted_right front back hole regborder

#apply nve integration to all particles that are inserted as single particles
fix     integr all nve/sphere

#output settings
variable nthermo equal ceil(${status_output}/${dt})
variable ndump equal ceil(${data_output}/${dt})

fix     ts all check/timestep/gran ${nthermo} 0.11 0.11
compute rke all erotate/sphere
thermo_style    custom step time atoms ke c_rke f_ts[1] f_ts[2]
thermo  ${nthermo}
thermo_modify   lost ignore norm no

#compute total mass in hopper, write to file in a format that octave can read
variable    totalmass equal mass(all)
shell       mkdir post
fix         extra all print ${nthermo} "${totalmass}" screen no file post/mass.txt title "%particle mass over time"

#regular dump
dump    dump_parts all custom/vtk ${ndump} post/main_particles_*.vtp id type x y z ix iy iz vx vy vz fx fy fz omegax omegay omegaz tqx tqy tqz radius density
dump    dump_walls all mesh/vtk ${ndump} post/main_walls_*.vtp stress

#insert particles and let them settle
variable nsteps equal ceil(${run_time_main}/${dt})
run     ${nsteps}
